# Bisection Method
f(x) := ln(x) + x
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bisec(a, b, e) :=
    while b - a > 2*e
        x ← (a + b)/2
        b ← x if f(a)*f(x) < 0
        a ← x otherwise
    x ← (a + b)/2
    x
x := bisec(0.01, 0.99, 0.05) = 0.591875
f(x) = 0.0674152
