# Error of Function with many parameters
f(x, y, z) := x*ln(y + z)
d/dx(f(x, y, z)) → ln(y + z)
d/dy(f(x, y, z)) → x/(y + z)
d/dz(f(x, y, z)) → x/(y + z)
x := 3.5
delX := 0.05
y := 0.75
delY := 0.005
z := 3.2
delZ := 0.05
delF := |ln(y + z)|*delX + |x/(y + z)|*delY + |x/(y + z)|*delZ
delF = 0.11742
F := f(x, y, z)
F = 4.808
