# Euler Method and Error check with Runge
f(t, y) := t^2 - y^2
Euler(y0, a, b, N) :=
    y[0] ← y0
    h ← (b - a)/N
    t[0] ← a
    for i ∈ 1 .. N
        y[i] ← y[i - 1] + h*f(a + (i - 1)*h, y[i - 1])
        t[i] ← a + i*h
    [t; y]
Q := Euler(2, 1, 2, 4)
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Q[0] = [1; 1.25; 1.5; 1.75; 2]
Q[1] = [2; 1.25; 1.25; 1.42188; 1.68207]
Run(u, v, N, p) :=
    for k ∈ 0 .. N
        R[k] ← |(u[k] - v[2*k])/(2^p - 1)|
    max(R)
u1 := Q[1]
w := Euler(2, 1, 2, 8)
u2 := w[1]
d := Run(u1, u2, 4, 1)
d = 0.203125
Z := rkfixed(2, 1, 2, 4, f)
A := rkfixed(2, 1, 2, 8, f)
v1 := Z[:, 1]
v2 := A[:, 1]
C := Run(v1, v2, 4, 4)
C = 8.80571e-5
