# Fixed Point Iteration
g(x) := 1/x + 1/x^2
f(x) := ln(x) + 2 - 1/x
d/dx(f(x)) → 1/x + 1/x^2
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m := g(1)
m = 2
M := g(0.5)
M = 6
a := 2/(M + m)
a = 0.25
q := (M - m)/(M + m) = 0.5
e := 10^-6
x[0] := 0.64
N := 2
E := (1 - q)/q*e = 1e-6
F(x) := x - a*f(x)
i := 0 .. N
x[i + 1] := F(x[i])
d[i + 1] := x[i + 1] - x[i]
x = [0.64; 0.642197; 0.642201; 0.642201]
d = [0; 0.00219678; 3.91059e-6; 1.7727e-8]
