# Interpolation of Newton
n := 3
x := [0.2; 0.4; 0.6; 0.8]
y := [2; 0; 3; 8]
diff(x, y, n) :=
    for i ∈ 0 .. n
        D[i] ← y[i]
    for k ∈ 1 .. n
        for i ∈ k .. n
            D[i, k] ← (D[i, k - 1] - D[i - 1, k - 1])/(x[i] - x[i - k])
    D
A := diff(x, y, n)
pN(t, D, x) :=
    y ← D[n, n]
    for k ∈ n - 1 .. 0
        y ← y*(t - x[k]) + D[k, k]
    y
A = [2, 0, 0, 0; 0, -10, 0, 0; 3, 15, 62.5, 0; 8, 25, 25, -62.5]
pN(0.45, A, x) = 0.398438
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