# Jacobi Method
ORIGIN := 1
A := [3, 0, 1; 1, -4, 1; 1, 2, 4]
b := [1; 1; 0]
N := 3
i := 1 .. N
j := 1 .. N
D[i] := b[i]/A[i, i]
B[i, j] := -A[i, j]/A[i, i]
B[i, i] := 0
B = [0, 0, -0.333333; 0.25, 0, 0.25; -0.25, -0.5, 0]
D = [0.333333; -0.25; 0]
p(B, C, M) :=
    x[:, 1] ← C
    for k ∈ 1 .. M
        x[:, k + 1] ← B*x[:, k] + C
    x
q := p(B, D, 15)
q = [
    0.333333, 0.333333, 0.319444, 0.333333, 0.333912, 0.332755, 0.333309, 0.333382, 0.33331, 0.33333, 0.333336, 0.333332, 0.333333, 0.333333, 0.333333, 0.333333;
    -0.25, -0.166667, -0.15625, -0.170139, -0.167101, -0.166088, -0.166793, -0.166709, -0.166637, -0.16667, -0.16667, -0.166665, -0.166667, -0.166667, -0.166667, -0.166667;
    0, 0.0416667, 0, -0.00173611, 0.00173611, 7.2338e-5, -0.000144676, 6.93239e-5, 9.04225e-6, -8.91666e-6, 2.51173e-6, 7.48288e-7, -4.76183e-7, 7.3477e-8, 5.10196e-8, -2.29025e-8
]
x := q[:, 16]
x = [0.333333; -0.166667; -2.29025e-8]
A*x = [1; 1; -9.53529e-8]
nrm(a, n) :=
    m ← |a[1]|
    for j ∈ 2 .. n
        m ← |a[j]| if |a[j]| > m
    m
nrm(b, 3) = 1
p2(B, C, e) :=
    x[:, 1] ← C
    x[:, 2] ← B*x[:, 1] + C
    k ← 1
    while nrm(x[:, k + 1] - x[:, k], 3) > (1 - normi(B))/normi(B)*e
        k ← k + 1
        x[:, k + 1] ← B*x[:, k] + C
    x[:, k + 1]
v := p2(B, D, 0.05)
v = [0.333333; -0.170139; -0.00173611]
A*v = [0.998264; 1.01215; -0.0138889]
