# Newton Method
f(x) := cos(x) - 1/3
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N := 10
n := 0 .. N
x[0] := 2
x[n + 1] := x[n] - (cos(x[n]) - 1/3)/(-sin(x[n]))
d[n + 1] := x[n + 1] - x[n]
e := 0.05
x = [2; 1.17576; 1.23157; 1.23096; 1.23096; 1.23096; 1.23096; 1.23096; 1.23096; 1.23096; 1.23096; 1.23096]
d = [0; -0.824241; 0.0558074; -0.000606993; -6.50571e-8; 0; 0; 0; 0; 0; 0; 0]
