# Rectangle Rule
f(x) := sin(x)/x
a := 1
b := 2
N := 5
h := (b - a)/N
S1 := h*sum(f(a + i*h - h/2), i = 1 .. N)
S1 = 0.659554
X := integral(f(x), x = a .. b)
X = 0.65933
|X - S1| = 0.000223832
N2 := 2*N
h2 := (b - a)/N2
S2 := h2*sum(f(a + i*h2 - h2/2), i = 1 .. N2)
S2 = 0.659386
p := 2
|X - S2| = 5.59361e-5
R := (S2 - S1)/(2^p - 1)
R = -5.59652e-5
