# Simpson Rule
f(x) := sin(x)/x
a := 1
b := 2
N := 5
h := (b - a)/N
S1 := h/6*(f(1) + f(2) + 4*sum(f(a + i*h - h/2), i = 1 .. N) + 2*sum(f(a + i*h), i = 0 .. N - 1))
S1 = 0.715428
X := integral(f(x), x = a .. b) = 0.65933
|X - S1| = 0.0560981
N2 := 2*N
h2 := (b - a)/N2
S2 := h2/6*(f(1) + f(2) + 4*sum(f(a + i*h2 - h2/2), i = 1 .. N2) + 2*sum(f(a + i*h2), i = 0 .. N2 - 1))
S2 = 0.687379
|X - S2| = 0.028049
p := 4
R := (S2 - S1)/(2^p - 1)
R = -0.00186994
