# Simpson Rule
f(x) := sin(x)/x
a := 1
b := 2
N := 5
h := (b - a)/N
S1 := h/6*(f(1) + f(2) + 4*sum(f(a + i*h - h/2), i = 1 .. N) + 2*sum(f(a + i*h), i = 1 .. N - 1))
S1 = 0.65933
X := integral(f(x), x = a .. b) = 0.65933
|X - S1| = 3.32738e-8
N2 := 2*N
h2 := (b - a)/N2
S2 := h2/6*(f(1) + f(2) + 4*sum(f(a + i*h2 - h2/2), i = 1 .. N2) + 2*sum(f(a + i*h2), i = 1 .. N2 - 1))
S2 = 0.65933
|X - S2| = 2.07853e-9
p := 4
R := (S2 - S1)/(2^p - 1)
R = -2.07968e-9
