# Trapezoidal Rule
f(x) := sin(x)/x
a := 1
b := 2
N := 5
h := (b - a)/N
S1 := h*((f(a) + f(b))/2 + sum(f(a + i*h), i = 1 .. N - 1))
S1 = 0.658882
X := integral(f(x), x = a .. b) = 0.65933
|X - S1| = 0.000447563
N2 := 2*N
h2 := (b - a)/N2
S2 := h2*((f(a) + f(b))/2 + sum(f(a + i*h2), i = 1 .. N2 - 1))
S2 = 0.659218
|X - S2| = 0.000111866
p := 2
R := (S2 - S1)/(2^p - 1)
R = 0.000111899
