x := [0; 0.1; 0.2; 0.3; 0.4; 0.6]
y := [2; 1.8; 1.7; 1.2; 1.0; 0.9]
n := 5
m := 1
k := 0 .. m
j := 0 .. m
A[k, j] := sum(x[i]^(k + j), i = 0 .. n)
b[k] := sum(y[i]*x[i]^k, i = 0 .. n)
A = [6, 1.6; 1.6, 0.66]
b = [8.6; 1.82]
a := lsolve(A, b)
a = [1.97429; -2.02857]
P1(t) := a[0] + a[1]*t
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.
d1 := sqrt(1/(n + 1)*sum((P1(x[i]) - y[i])^2, i = 0 .. n))
d1 = 0.124595
