x := [0; 0.1; 0.2; 0.3; 0.4]
y := [1; 2; 3.5; 8.2; 15.7]
f0(x) := 1
f1(x) := 2^x
n := 4
A[0, 0] := sum(f0(x[i])*f0(x[i]), i = 0 .. n)
A[0, 1] := sum(f0(x[i])*f1(x[i]), i = 0 .. n)
A[1, 1] := sum(f1(x[i])*f1(x[i]), i = 0 .. n)
A[1, 0] := sum(f1(x[i])*f0(x[i]), i = 0 .. n)
A = [5, 5.77112; 5.77112, 6.72502]
b[0] := sum(y[i]*f0(x[i]), i = 0 .. n)
b[1] := sum(y[i]*f1(x[i]), i = 0 .. n)
b = [30.4; 37.9756]
a := lsolve(A, b)
a = [-46.1132; 45.2193]
F(t) := a[0]*f0(t) + a[1]*f1(t)
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d := sqrt(1/(n + 1)*sum((F(x[i]) - y[i])^2, i = 0 .. n))
d = 1.7658
